680*470/(680 + 470) = 277.913
750*470/(750 + 470) = 288.934
750*510/(750 + 510) = 303.571
20/54 = 0.37037
10/72 = 0.138889
620*560/(620 + 560) = 294.237
# Расчет источника питания
#
# 1. Расчет обратноходового преобразователя с 5 выходными напряжениями
# 1.1. Требования к обратноходовому преобразователю
#
# 1.1.1.  Входное напряжение
# 1.1.1.1.  Номинал Uвх=24В
# 1.1.1.2.  Минимум Uвхмин=18В
# 1.1.1.3.  Максимум Uвхмакс=36В
# 1.1.2.  Выходы
# 1.1.2.1.  Us1= +6В (+6VD, KT4) I1=150...500мА (I1max=500мА)
# Основное цифровое питание
# 1.1.2.2.  Us2= +18В(+18VA, KT6) I2=50...100мА (I2max=100мА)
# Положительное аналоговое питание
# 1.1.2.3.  Us3 = +27В(+27VA, KT5) I3=10...20мА (I3max=20мА)
# Питание цепей ICP
# 1.1.2.4.  Us4=-18В (-18VA, KT8) I4=10..20мА (I4max=20мА)
# Отрицательное аналоговое питание
# 1.1.2.5.  Us5=+18В (+18V3, KT9) I5=10...50мА (I5max=50мА)
# Гальваноразвязанное питание интерфейса 4...20мА
# 1.1.2.6.  Up2= +9В I6=0...10мА (I6max=10мА)
# Питание по первичной стороне DPA424
# 1.1.3.  Мощность потребления Pout=7Вт
Uinmin := 18
Uinmax := 36
U1 := 6
I1 := 0.5  # Основное цифровое питание
U2 := 18
I2 := 0.100  # Положительнон аналоговое питание
U3 := 27
I3 := 0.02  # Аналоговое питание цепей ICP
U4 := -18
I4 := 0.02  # Отрицательное аналоговое питание
U5 := 18
I5 := 0.05  # Питание интерфейса 4...20мА
U6 := 9
I6 := 0.01  # Питание преобразователя
Pout := 7
Pin := 8
# Для DPA424G выбираем частоту преобразования 400кГц (вывод 4 на 0V)
Ft := 400*10^3
# 1.2  Расчет входного фильтра
# При
L9 := 33*10^-6
L10 := 33*10^-6
C18 := 10*10^-6
Fсрф := 1/(2*π*sqrt((L9 + L10)*C18)) = 6195.1
# На частоте Ft=400кГц ослабление будет 74дБ или ~2000раз, что приемлемо. Для дополнительного ослабления помех на высоких частотах используется ферритовій фильтр BLM18PG471SN1 и керамический конденсатор 1мкФ
# 1.3  Расчет резистора R27 (вывод 2 (L) DPA424)
# Резистор R27 используется для undervoltage и overvoltage защиты источника питания. Выбираем
R27 := 270*10^3
# При этом
Uuv := 52*10^-6*R27 + 2.5 = 16.54
Uov := 135*10^-6*R27 + 2.35 = 38.8
# Что удовлетворяет условиям (Uuv=18В и Uov=36В)
# 1.3.  Расчет первичной цепи обратно-ходового преобразователя
# Выбираем подходящий сердечник EE16/8/5 (EF16) - две пары P4-EF16-G025
# Параметры этой пары:
# AL = 69nH (индуктивностью на виток)
# le = 37,6мм (длина средней линии)
# lm = 0,5мм (длина воздушного зазора)
# Ae = 20,1мм2 (среднее сечение магнитопровода)
# Выбираем каркас EE16/8/5 горизонтальный, 14 выводов (BH-EF16-1-14Q-PS).
# Для намотки остается Wp=10мм.
# Считаем индуктивность первичной обмотки Lp при намотке проводом 0.2 (внешний диаметр Dp=0,2мм) при двуслойной  (число витков Np) намотке
AL := 69*10^-9
le := 37.6
lm := 0.5
Ae := 20.1
μ0 := 4*π*10^-7
μe := 102
μ := 2200
Wp := 10
Dp := 0.22
Np := 2*Wp/(1*Dp) = 90.9091
Np := 90
Lp := AL*Np^2 = 0.0005589
# Энергия первичной обмотки дросселя E=Lp*I**2/2. Эта энергия должна быть накоплена в дросселе, чтобы мощность за период Pt была 8Вт.
# Из Pt=E*Ft следует
Ip := sqrt(2*Pin/(Lp*Ft)) = 0.267524
# Т.е. ток первичной обмотки не должен быть меньше, чем 0,27А. Выбираем максимальный ток из расчета максимальной индукции в сердечнике 0,15Т
Bmax := 0.15
Imax := Bmax*(Lp/(μ*μ0*Np)) + Bmax*lm*10^-3/(μ0*Np)  # Максимальный ток
Imax = 0.663483
# Выбираем
Imax := 0.85  # При этом R11=24k
# Оценим режим работы DC/DC (непрерывный или прерывистый) исходя из диапазона входных напряжений и индуктивности первичной обмотки Lp
# Проверяем приращение тока в первичной обмотке  ΔIp при минимальном Uвхмин=18В
# при максимальном цикле 50%.
Uвхмин := 18
Uвхмакс := 36
ΔIp := 1/Lp*Uвхмин/(2*Ft) = 0.0402576
# При токе
Ip := 0.8  # это приращение доставляет мощность
P := Lp*Ft*Ip*ΔIp = 7.2  # Этого достаточно
# Т.е. первичную обмотку наматываем в два слоя 90 витками проводом 0,2мм (внешним диаметром Dp=0.22)
# Оценим индукцию в сердечнике
Hc := Imax*Np/(le*10^-3) = 2034.57
Bc := μe*μ0*Hc = 0.260786
# Оцениваем омическое сопротивление первичной обмотки.
ρm := 0.0175
lp := 2
Dpm := 0.2
Sp := π*Dpm^2/4
π = 3.14159
Sp = 0.0314159
Rp := ρm*lp/Sp = 1.11408
# 1.4.  Расчет вторичних цепей обратно-ходового преобразователя
# 1.4.1.  Цепь положительного аналогового питания +18VA (U2)
# Намотаем эту вторичную обмотку одинарным проводом диаметром 0,2 (внешний диаметр Ds2=0.22) в один слой. Получим Ns2 число витков
Ds2 := 0.22
Ns2 := Wp/Ds2 = 45.4545
Ns2 := 45
# Примем , что 45 витков будет соответствовать напряжению выброса
Us2 := 18.5
# Тогда зеркальное напряжение Umir будет
Umir := Us2*Np/Ns2 = 37
# А общее максимальное напряжение на стоке DPA424 (без учета выброса от
# индуктивности рассеяния) 73В. При этом максимальное обратное напряжение на выпрямительном диоде Шоттки VD16
Urev2 := Us2 + Uвхмакс*Ns2/Np = 36.5  # (т.е. диод нужен не менее чем MBR0540)
# 1.4.2.  Цепь положительного аналогового питония +27VA (U3)
# Намотаем эту вторичную обмотку сложенным вдвое проводом диаметром 0,2 (внешний диаметр Ds2=0.22) в один слой. Получим Ns3 число витков
Ds3 := 0.22
Ns3 := Wp/(Ds3*2) = 22.7273
Ns3 := 22
# 22 витка соместно с 45 витками будет формирововать Us3
Us3 := Umir*(Ns2 + Ns3)/Np = 27.5444
# При этом максимальное обратное напряжение на выпрямительном диоде Шоттки VD15
Urev3 := Us3 + Uвхмакс*(Ns2 + Ns3)/Np = 54.3444  # (т.е. диод нужен не менее чем MBR0560)
# 1.4.3.  Основное цифровое питание +6В (U1)
# Намотаем эту вторичную обмотку проводом диаметром 0,2, сложенным втрое, в один слой. Получим Ns1 число витков
Ds1 := 0.22
Ns1 := Wp/(Ds1*3) = 15.1515
Ns1 := 15
# 15 витков будет соответствовать напряжению
Us1 := Umir*Ns1/Np = 6.16667
# При этом максимальное обратное напряжение на выпрямительном диоде Шоттки VD14
Urev1 := Us1 + Uвхмакс*Ns1/Np = 12.1667
# 1.4.4.  Цепь -18В (U4). Отрицательное аналоговое питание
# Намотаем эту обмотку проводом диаметром 0,2 в один слой.
Ds4 := 0.22
Ns4 := Wp/Ds4 = 45.4545
Ns4 := 45
# 45 витков будет соответствовать напряжению
Us4 := Umir*Ns4/Np = 18.5
# При этом максимальное обратное напряжение на выпрямительном диоде Шоттки VD13
Urev4 := Us4 + Uвхмакс*Ns4/Np = 36.5  # (т.е. диод нужен не менее чем MBR0540)
# 1.4.5.  Цепь интерфейса 4...20мА +18V3 (U5)
# Намотаем эту вторичную обмотку одинарным проводом диаметром 0,2 (внешний диаметр Ds2=0.22) в один слой. Получим Ns2 число витков
Ds5 := 0.22
Ns5 := Wp/Ds5 = 45.4545
Ns5 := 45
# 45 витков будет соответствовать напряжению
Us5 := Umir*Ns5/Np = 18.5
# При этом максимальное обратное напряжение на выпрямительном диоде Шоттки VD13
Urev5 := Us5 + Uвхмакс*Ns5/Np = 36.5  # (т.е. диод нужен не менее чем MBR0540)
# 1.4.4.  Цепь +9В (U6)
# Намотаем эту обмотку сложенным вдвое проводом диаметром 0,2 в один слой
Ds6 := 0.22
Ns6 := Wp/(2*Ds6) = 22.7273
Ns6 := 22
# 22 витка будет соответствовать напряжению
Us6 := Umir*Ns6/Np = 9.04444
# При этом максимальное обратное напряжение на выпрямительном диоде VD11
Urev6 := Us6 + Uвхмакс*Ns6/Np = 17.8444
# Расчет выходных фильтров
#
# 1) Дроссели 10uH и конденсаторы 22uF
Cвыхф := 22*10^-6
Lвыхф := 10*10^-6
Fсрвыхф := 1/(2*π*sqrt(Lвыхф*Cвыхф)) = 10730.2
# Коэффициент ослабления 40дБ/дек, 6дб/окт. При частоте 400кГц 800раз
# 2) Дроссели 10uH и конденсаторы 10uF
Cвыхф := 10*10^-6
Lвыхф := 10*10^-6
Fсрвыхф := 1/(2*π*sqrt(Lвыхф*Cвыхф)) = 15915.5
# Коэффициент ослабления 40дБ/дек, 6дб/окт. При частоте 400кГц 200раз
# 3) Дроссели 4,7uH и конденсаторы 10uF
Cвыхф := 4*10^-6
Lвыхф := 4.7*10^-6
Fсрвыхф := 1/(2*π*sqrt(Lвыхф*Cвыхф)) = 36706.4
# Т.е. получаем коэффициент ослабления 40дБ/дек. Это при частоте 400кГц 100раз
